// COMSOL Multiphysics 6.2.0.290 model "semiconductors final[1].mph"
// Outline of the model tree

Parameters
  V_N = 0[V]
  V_P = 5[V]
  D = 1e17[cm^-3]

Geometry
  geom1 "Geometry 1" (2D, length unit µm)
    r1: Rectangle | layername = Layer 1; layer = 5; layerright = on; layerbottom = off; size = {10, 5}
    fin: Finalize "Form Union"

Materials
  mat4: Common "Al(x)Ga(1-x)As - Aluminium Gallium Arsenide" on all domains
    def "Basic"
      relpermittivity = 12.9-2.84*def.x
      thermalconductivity = (55-212*def.x+248*def.x^2)[W/(m*K)]
      density = (5320-1560*def.x)[kg/m^3]
      heatcapacity = (330-120*def.x)[J/(kg*K)]
      x = 0.2
    SemicondMaterial "Semiconductor material"
      Eg0 = if(def.x<0.45,(1.424+1.247*def.x),(1.9+0.125*def.x+0.143*def.x^2))[V]
      chi0 = if(def.x<0.45,(4.07-1.1*def.x),(3.64-0.14*def.x))[V]
      Nv = (T/1[K])^(3/2)*(0.51+0.25*def.x)^(3/2)*4.82e15[1/cm^3]
      Nc = if(def.x<0.45,((T/1[K])^(3/2)*(0.063+0.083*def.x)^(3/2)*4.82e15[1/cm^3]),((T/1[K])^(3/2)*(0.85-0.14*def.x)^(3/2)*4.82e15[1/cm^3]))
      mun = if(def.x<0.45,(8e3-2.2e4*def.x+1e4*def.x^2),(-255+1160*def.x-720*def.x^2))[cm^2/(V*s)]
      mup = (370-970*def.x+740*def.x^2)[cm^2/(V*s)]

Physics
  semi: Semiconductor on all domains
    dependent variable V
    smm1: SemiconductorMaterialModel (default)
    ins1: Insulation (default)
    zc1: ZeroCharge (default)
    ii1: InsulatorInterface (default)
    cont1: Continuity "Continuity/Heterojunction 1" (default)
    init1: init "Initial Values 1" (default)
    adm1: AnalyticDopingModel "Acceptor" on domains 2 | NAc = D
    adm2: AnalyticDopingModel "Donor" on domains 1 | impurityType = donor; NAc = D; NDc = D
    mc1: MetalContact "P_type" on boundaries 7 | V0 = V_P
    mc2: MetalContact "N_type" on boundaries 1 | V0 = V_N

Mesh
  mesh1 "Mesh 1"
    size: MeshSizeDefault | hmax = 0.28; hmin = 0.03; hauto = 6
    ftri1: FreeTri "Free Triangular 1" on remaining entities

Studies
  std1 "Study 1"
    stat: Stationary | useparam = on; pname = V_P; plistarr = range(0,0.1,2); punit = V

Solver configurations
  sol1 "Solution 1" (study std1)
    v1: Variables "Dependent Variables 1"
    s1: Stationary "Stationary Solver 1" | stol = 1.0E-6
      p1: Parametric | porder = constant
      fc1: FullyCoupled | linsolver = d1; initstep = 0.1; minsteprecovery = 0.001; maxiter = 50
      d1: Direct

Datasets
  dset1: Solution | solution = sol1

Plots
  pg1: PlotGroup2D "Electron Concentration (semi)" | data = dset1
    surf1: Surface | expr = semi.N; unit = 1/cm^3
  pg2: PlotGroup2D "Hole Concentration (semi)" | data = dset1
    surf1: Surface | expr = semi.P; unit = 1/cm^3
  pg3: PlotGroup2D "Electric Potential (semi)" | data = dset1
    surf1: Surface | expr = V
  pg4: PlotGroup2D "Net Dopant Concentration (semi)"
    data = dset1
    title = Net Dopant Concentration \vert N<sub>d</sub> - N<sub>a</sub>\vert: P-type (Red), N-type (Blue)
    surf2: Surface "P-type" | expr = semi.Nnetdop; unit = 1/cm^3
      filt1: Filter | expr = semi.Na-semi.Nd > 1[1/cm^3]; useder = on
    surf1: Surface "N-type" | expr = semi.Nnetdop; unit = 1/cm^3
      filt1: Filter | expr = semi.Nd-semi.Na > 1[1/cm^3]; useder = on
  pg5: PlotGroup1D "1D Plot Group 5" | data = dset1
    glob1: Global | expr = semi.I0_1; unit = A; descr = Terminal current